# Unidades
uA := 10^-3*mA
um := 10^-6*m
fF := 10^-15*farad
q := 1.6*10^-19*coul
pF := 10^-12*farad
Hz = 1 1/s
mA := 10^-3*A
# Dados
I_B := 55*uA
C_L := 1*pF
V_DD := 1.2*V
V_Dsat1n := 50*mV
V_Dsat1p := 70*mV
V_Dsat3 := 60*mV
V_Dsat5 := 75*mV
V_Dsat7 := 150*mV
V_Dsat10 := 150*mV
L1n := 1*um
L1p := 0.36*um
L3 := 0.60*um
L5 := 0.50*um
L7 := 0.65*um
L10 := 1*um
V_bs1n := 250*mV
V_bs1p := 250*mV
V_bs3 := 250*mV
V_bs5 := 250*mV
V_bs7 := 0*mV
V_bs10 := 0*mV
# Definições da Tecnologia
V_TN := 0.38*volt
K_N := 500*uA*volt^-2
K_B := 1.38*10^-23*joule/K
V_TP := 0.33*volt
K_P := 150*uA*volt^-2
K_B*300*K/q = 0.025875 V
BE := 0.700
CGSD0 := 0.30*fF/um  # Capacidade de overlap
CGOX := 12.3*fF/um^2  # Capacidade por unidade de area da gate
Sd_s := 0.4*um  # lado do dreno ou source
CJN := 0.722*fF/um^2
CJP := 0.953*fF/um^2  # Capacidade por unidade de area de um diodo
PBN := 0.62*volt
PBP := 0.684*volt  # Potencial da juncao
MJN := 0.264
MJP := 0.295  # Coeficiente de ajuste
CJSWN := 0.0993*fF/um
CJSWP := 0.105*fF/um  # Capacidade lateral por unidade de perimetro
MJSWN := 0.105
MJSWP := 0.135  # Coeficiente de ajuste
# Características dos Transistores
gm(I_D, V_Dsat) := if(V_Dsat < K_B*300*K/q*2, I_D/(K_B*300*K/q), 2*I_D/V_Dsat)
W_L_N(I_D, V_Dsat) := 2*I_D/(K_N*V_Dsat^2)
W_L_P(I_D, V_Dsat) := 2*I_D/(K_P*V_Dsat^2)
W_N(I_D, V_Dsat, L) := 2*I_D*L/(K_N*V_Dsat^2)
W_P(I_D, V_Dsat, L) := 2*I_D*L/(K_P*V_Dsat^2)
C_gdN(I_D, V_Dsat, L) := W_L_N(I_D, V_Dsat)*L*CGSD0
g_dsN(I_D, L) := I_D/(5749*mV/um*L)
C_gdP(I_D, V_Dsat, L) := W_L_P(I_D, V_Dsat)*L*CGSD0
g_dsP(I_D, L) := I_D/(11705*mV/um*L)
C_gsN(I_D, V_Dsat, L) := 2/3*(W_L_N(I_D, V_Dsat)*L^2)*CGOX
C_gsP(I_D, V_Dsat, L) := 2/3*(W_L_P(I_D, V_Dsat)*L^2)*CGOX
C_dbN(I_D, V_Dsat, L, V_db) := ((W_L_N(I_D, V_Dsat)*L) + Sd_s)*2*CJSWN/(1 + V_db/PBN)^MJSWN + W_L_N(I_D, V_Dsat)*L*Sd_s*CJN/(1 + V_db/PBN)^MJN
C_dbP(I_D, V_Dsat, L, V_bd) := ((W_L_P(I_D, V_Dsat)*L) + Sd_s)*2*CJSWP/(1 + V_bd/PBP)^MJSWP + W_L_P(I_D, V_Dsat)*L*Sd_s*CJP/(1 + V_bd/PBP)^MJP
C_sbP(I_D, V_Dsat, L, V_bs) := W_L_P(I_D, V_Dsat)*L*(Sd_s + L)*CJP/(1 - V_bs/PBP)^MJP + (W_L_P(I_D, V_Dsat)*L + Sd_s)*2*CJSWP/(1 - V_bs/PBP)^MJSWP + 2*W_L_P(I_D, V_Dsat)*L^2*CJP/(3*(1 - V_bs/PBP)^MJP)
C_sbN(I_D, V_Dsat, L, V_bs) := W_L_N(I_D, V_Dsat)*L*(Sd_s + L)*CJN/(1 - V_bs/PBN)^MJN + (W_L_N(I_D, V_Dsat)*L + Sd_s)*2*CJSWN/(1 - V_bs/PBN)^MJSWN + 2*W_L_N(I_D, V_Dsat)*L^2*CJN/(3*(1 - V_bs/PBN)^MJN)
# Características do Circuito
g_oP(I_B, V_Dsat3, L10, L1n, L3) := (g_dsP(I_B, L10) + g_dsN(I_B/2, L1n))*g_dsP(I_B/2, L3)/(BE*gm(I_B/2, V_Dsat3))
g_oN(I_B, V_Dsat5, L7, L5, L1p) := (g_dsN(I_B, L7) + g_dsP(I_B/2, L1p))*g_dsN(I_B/2, L5)/(BE*gm(I_B/2, V_Dsat5))
gain(I_B, V_Dsat1n, V_Dsat1p, V_Dsat3, V_Dsat5, L10, L1n, L3, L7, L5, L1p) := BE*(gm(I_B/2, V_Dsat1n) + gm(I_B/2, V_Dsat1p))/(g_oP(I_B, V_Dsat3, L10, L1n, L3) + g_oN(I_B, V_Dsat5, L7, L5, L1p))
C_out(I_B, V_Dsat5, V_Dsat3, V_bs5, V_bs3, L5, L3) := C_L + C_dbN(I_B/2, V_Dsat5, L5, V_bs5) + C_dbP(I_B/2, V_Dsat3, L3, V_bs3) + C_gdN(I_B/2, V_Dsat5, L5) + C_gdP(I_B/2, V_Dsat3, L3)
GBW(I_B, V_Dsat1n, V_Dsat1p, V_Dsat5, V_Dsat3, V_bs5, V_bs3, L5, L3) := BE*(gm(I_B/2, V_Dsat1n) + gm(I_B/2, V_Dsat1p))/(C_out(I_B, V_Dsat5, V_Dsat3, V_bs5, V_bs3, L5, L3)*2.*π)
C_dif(I_B, V_Dsat1n, V_Dsat10, V_Dsat3, V_bs1n, V_bs3, V_bs10, L1n, L10, L3) := C_dbN(I_B/2, V_Dsat1n, L1n, V_bs1n) + C_dbP(I_B, V_Dsat10, L10, V_bs10) + C_gdP(I_B, V_Dsat10, L10) + C_gdN(I_B/2, V_Dsat1n, L1n) + C_gsP(I_B/2, V_Dsat3, L3) + C_sbP(I_B/2, V_Dsat3, L3, V_bs3)
C_dif3(I_B, V_Dsat1p, V_Dsat7, V_Dsat5, V_bs1p, V_bs5, V_bs7, L1p, L7, L5) := C_dbP(I_B/2, V_Dsat1p, L1p, V_bs1p) + C_dbN(I_B, V_Dsat7, L7, V_bs7) + C_gdN(I_B, V_Dsat7, L7) + C_gdP(I_B/2, V_Dsat1p, L1p) + C_gsN(I_B/2, V_Dsat5, L5) + C_sbN(I_B/2, V_Dsat5, L5, V_bs5)
fp2(I_B, V_Dsat1n, V_Dsat10, V_Dsat3, V_bs1n, V_bs3, V_bs10, L1n, L10, L3) := BE*gm(I_B/2, V_Dsat3)/(C_dif(I_B, V_Dsat1n, V_Dsat10, V_Dsat3, V_bs1n, V_bs3, V_bs10, L1n, L10, L3)*2*π)
fp3(I_B, V_Dsat1p, V_Dsat7, V_Dsat5, V_bs1p, V_bs5, V_bs7, L1p, L7, L5) := BE*gm(I_B/2, V_Dsat5)/(C_dif3(I_B, V_Dsat1p, V_Dsat7, V_Dsat5, V_bs1p, V_bs5, V_bs7, L1p, L7, L5)*2*π)
OS(V_DD, V_Dsat10, V_Dsat3, V_Dsat5, V_Dsat7) := V_DD - V_Dsat10 - V_Dsat3 - V_Dsat5 - V_Dsat7 - 0.08*V
ENF(I_B, V_Dsat1n, V_Dsat1p, V_Dsat10, V_Dsat7) := (2 + gm(I_B, V_Dsat10)/(BE*gm(I_B/2, V_Dsat1n)) + gm(I_B, V_Dsat7)/(BE*gm(I_B/2, V_Dsat1p)))
# Gráficos das Grandezas do Circuito
i := 1 .. 100
V_Dsat[i] := 50*mV + i/100*100*mV
L[i] := 0.36*um + i/100*0.76*um
I[i] := 10*uA + i/100*500*uA
# [plot: gain(I_B, V_Dsat[i], V_Dsat1p, V_Dsat3, V_Dsat5, L10, L1n, L3, L7, L5, L1p), gain(I_B, V_Dsat1n, V_Dsat[i], V_Dsat3, V_Dsat5, L10, L1n, L3, L7, L5, L1p), gain(I_B, V_Dsat1n, V_Dsat1p, V_Dsat[i], V_Dsat5, L10, L1n, L3, L7, L5, L1p), gain(I_B, V_Dsat1n, V_Dsat1p, V_Dsat3, V_Dsat[i], L10, L1n, L3, L7, L5, L1p) vs V_Dsat[i]]
# PARA FAZER UM INDICE "de Array": AltGr + [
# PARA FAZER UM INDICE "Cosmestico": . (ponto)
# [plot: gain(I_B, V_Dsat1n, V_Dsat1p, V_Dsat3, V_Dsat5, L[i], L1n, L3, L7, L5, L1p), gain(I_B, V_Dsat1n, V_Dsat1p, V_Dsat3, V_Dsat5, L10, L[i], L3, L7, L5, L1p), gain(I_B, V_Dsat1n, V_Dsat1p, V_Dsat3, V_Dsat5, L10, L1n, L[i], L7, L5, L1p), gain(I_B, V_Dsat1n, V_Dsat1p, V_Dsat3, V_Dsat5, L10, L1n, L3, L[i], L5, L1p), gain(I_B, V_Dsat1n, V_Dsat1p, V_Dsat3, V_Dsat5, L10, L1n, L3, L7, L[i], L1p), gain(I_B, V_Dsat1n, V_Dsat1p, V_Dsat3, V_Dsat5, L10, L1n, L3, L7, L5, L[i]) vs L[i]]
# [plot: GBW(I_B, V_Dsat[i], V_Dsat1p, V_Dsat5, V_Dsat3, V_bs5, V_bs3, L5, L3), GBW(I_B, V_Dsat1n, V_Dsat[i], V_Dsat5, V_Dsat3, V_bs5, V_bs3, L5, L3), GBW(I_B, V_Dsat1n, V_Dsat1p, V_Dsat[i], V_Dsat3, V_bs5, V_bs3, L5, L3), GBW(I_B, V_Dsat1n, V_Dsat1p, V_Dsat5, V_Dsat[i], V_bs5, V_bs3, L5, L3) vs V_Dsat[i]]
# [plot: GBW(I_B, V_Dsat1n, V_Dsat1p, V_Dsat5, V_Dsat3, V_bs5, V_bs3, L[i], L3), GBW(I_B, V_Dsat1n, V_Dsat1p, V_Dsat5, V_Dsat3, V_bs5, V_bs3, L5, L[i]) vs L[i]]
# [plot: fp2(I_B, V_Dsat1n, V_Dsat10, V_Dsat3, V_bs1n, V_bs3, V_bs10, L[i], L10, L3), fp2(I_B, V_Dsat1n, V_Dsat10, V_Dsat3, V_bs1n, V_bs3, V_bs10, L1n, L[i], L3), fp2(I_B, V_Dsat1n, V_Dsat10, V_Dsat3, V_bs1n, V_bs3, V_bs10, L1n, L10, L[i]) vs L[i]]
# [plot: fp2(I_B, V_Dsat[i], V_Dsat10, V_Dsat3, V_bs1n, V_bs3, V_bs10, L1n, L10, L3), fp2(I_B, V_Dsat1n, V_Dsat[i], V_Dsat3, V_bs1n, V_bs3, V_bs10, L1n, L10, L3), fp2(I_B, V_Dsat1n, V_Dsat10, V_Dsat[i], V_bs1n, V_bs3, V_bs10, L1n, L10, L3) vs V_Dsat[i]]
# [plot: fp3(I_B, V_Dsat1p, V_Dsat7, V_Dsat5, V_bs1p, V_bs5, V_bs7, L[i], L7, L5), fp3(I_B, V_Dsat1p, V_Dsat7, V_Dsat5, V_bs1p, V_bs5, V_bs7, L1p, L[i], L5), fp3(I_B, V_Dsat1p, V_Dsat7, V_Dsat5, V_bs1p, V_bs5, V_bs7, L1p, L7, L[i]) vs L[i]]
# [plot: fp3(I_B, V_Dsat[i], V_Dsat7, V_Dsat5, V_bs1p, V_bs5, V_bs7, L1p, L7, L5), fp3(I_B, V_Dsat1p, V_Dsat[i], V_Dsat5, V_bs1p, V_bs5, V_bs7, L1p, L7, L5), fp3(I_B, V_Dsat1p, V_Dsat7, V_Dsat[i], V_bs1p, V_bs5, V_bs7, L1p, L7, L5) vs V_Dsat[i]]
# [plot: ENF(I_B, V_Dsat[i], V_Dsat1p, V_Dsat10, V_Dsat7), ENF(I_B, V_Dsat1n, V_Dsat[i], V_Dsat10, V_Dsat7), ENF(I_B, V_Dsat1n, V_Dsat1p, V_Dsat[i], V_Dsat7), ENF(I_B, V_Dsat1n, V_Dsat1p, V_Dsat10, V_Dsat[i]) vs V_Dsat[i]]
# Optimização do Circuito
V_Dsat1n := 55*mV
V_Dsat1p := 60*mV
V_Dsat3 := 105*mV
V_Dsat5 := 56*mV
V_Dsat7 := 135*mV
V_Dsat10 := 135*mV
V_DD := 1.2*V
L1n := 0.90*um
L1p := 0.4*um
L3 := 0.4*um
L5 := 0.40*um
L7 := 0.50*um
L10 := 0.90*um
I_B := 30*uA
# w1=w2, usado no cadence;
# Lmb5=3,8um
20*log(gain(I_B, V_Dsat1n, V_Dsat1p, V_Dsat3, V_Dsat5, L10, L1n, L3, L7, L5, L1p)) = 66.9356
W_P(I_B/2, BE*V_Dsat1p, L1p) = 4.53515e-5 m
W_MB5 := W_N(I_B/10, V_Dsat7 + BE*V_Dsat5 + 100*mV, 3.8*um) = 6.06499e-7 m
gain(I_B, V_Dsat1n, V_Dsat1p, V_Dsat3, V_Dsat5, L10, L1n, L3, L7, L5, L1p) = 2222.19
GBW(I_B, V_Dsat1n, V_Dsat1p, V_Dsat5, V_Dsat3, V_bs5, V_bs3, L5, L3) = 115079768 1/s
W_N(I_B/2, BE*V_Dsat1n, L1n) = 3.64311e-5 m
# Lmb6=1,2um
W_MB6 := W_P(I_B/10, V_Dsat10 + BE*V_Dsat3 + 100*mV, 1.2*um) = 5.04349e-7 m
W_P(I_B, V_Dsat10, L10) = 1.97531e-5 m
fp2(I_B, V_Dsat1n, V_Dsat10, V_Dsat3, V_bs1n, V_bs3, V_bs10, L1n, L10, L3) = 488194832 1/s
W_P(I_B/2, BE*V_Dsat3, L3) = 1.48086e-5 m  # WMB1=WMB4=WMB2
W_MB1 := W_P(I_B, V_Dsat10, L10)/10 = 1.97531e-6 m
fp3(I_B, V_Dsat1p, V_Dsat7, V_Dsat5, V_bs1p, V_bs5, V_bs7, L1p, L7, L5) = 1.08189e9 1/s
W_N(I_B/2, V_Dsat5, L5) = 7.65306e-6 m
OS(V_DD, V_Dsat10, V_Dsat3, V_Dsat5, V_Dsat7) = 0.689 V
W_MB3 := W_N(I_B, V_Dsat7, L7)/10 = 3.29218e-7 m  # Wmb3=Wmb7;
W_N(I_B, V_Dsat7, L7) = 3.29218e-6 m
ENF(I_B, V_Dsat1n, V_Dsat1p, V_Dsat10, V_Dsat7) = 4.43386
# Polo de Saída =
(g_oN(I_B, V_Dsat5, L7, L5, L1p) + g_oP(I_B, V_Dsat3, L10, L1n, L3))/(C_out(I_B, V_Dsat5, V_Dsat3, V_bs5, V_bs3, L5, L3)*2.*π) = 51786.5 1/s
P_D := V_DD*(3*I_B + 4*I_B/10)
P_D = 0.0001224 W
FoM := GBW(I_B, V_Dsat1n, V_Dsat1p, V_Dsat5, V_Dsat3, V_bs5, V_bs3, L5, L3)*1000*C_L/P_D
FoM = 940.194 1/V^2
